<?xml version="1.0"?>
<rocket_engine name="PQ_ENGINE">
  <isp> 190.2689608  </isp>
  <builduptime> 0.0 </builduptime>
  <thrust_table name="propulsion/thrust_prop_remain" type="internal">
    <tableData>
      0 98.627210038681
      0.1 229.460436326062
      0.5 275.037426022828
      0.9 269.951045136588
      1.3 265.098562518453
      1.7 259.185977388205
      2.1 255.97245691116
      2.5 254.557568082815
      2.9 254.02126017045
      3.3 252.42229760501
      3.7 249.963140742169
      4.1 245.976040601585
      4.5 241.165518454217
      4.9 238.193070877235
      5.3 233.947933701649
      5.7 229.602531349905
      6.1 224.702957647939
      6.5 219.2452855565
      6.9 214.413078858909
      7.3 209.481172330121
      7.7 203.858156027267
      8.1 197.543406263855
      8.5 72.3493787495688
      8.9 19.5632624201395
      9 7.84417789086176
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    </tableData>
  </thrust_table>
</rocket_engine>
